defI := 1.23
defC := 3
[33, 12]
n_disk := 4
[33, 12; 330, -∞]
calcCount(mIC) :=
    n ← rows(mIC)
    [n; n - 1]
makeDef_IC(n, kI0, kC0) :=
    res[n - 1, 1] ← 0
    for i ∈ 0 .. n - 1
        res[i, 0] ← defI
        res[i, 1] ← defC
    res[0, 0] ← kI0*res[0, 0]
    res[0, 1] ← kC0*res[0, 1]
    res[n - 1, 1] ← -∞ if n > 1
    res
I_C := makeDef_IC(n_disk, 1, 1)
# make the matrises
I_C = [1.23, 3; 1.23, 3; 1.23, 3; 1.23, -1e307]
_makeM(mIC) :=
    n ← calcCount(mIC)[0]
    if n == 1
        return
            M[0, 0] ← mIC[0, 0]
            M
    diag(mIC[:, 0])
_makeM(I_C) = [1.23, 0, 0, 0; 0, 1.23, 0, 0; 0, 0, 1.23, 0; 0, 0, 0, 1.23]
makeKlocal(c) := [c, -c; -c, c]
_makeK(mIC) :=
    n ← calcCount(mIC)[0]
    c1 ← mIC[0, 1]
    if n == 1
        return
            K[0, 0] ← c1
            K
    return makeKlocal(c1) if n == 2
    res[n - 1, n - 1] ← 0
    vc ← mIC[:, 1]
    sizeLocal ← 2
    for k ∈ 0 .. n - 2
        shift ← k
        for i ∈ 0 .. sizeLocal - 1
            for j ∈ 0 .. sizeLocal - 1
                is ← i + shift
                js ← j + shift
                res[is, js] ← res[is, js] + makeKlocal(vc[k])[i, j]
    res
makeKlocal(31) = [31, -31; -31, 31]
M := _makeM(I_C)
K := _makeK(I_C)
_makeEigVals(mM, mK) :=
    valsDraft ← genvals(mK, mM)
    s ← sort(valsDraft)
    n ← rows(mM)
    res ← s if n == 1
    res ← s otherwise
    res
K = [3, -3, 0, 0; -3, 6, -3, 0; 0, -3, 6, -3; 0, 0, -3, 3]
I_C[0, 1]/I_C[0, 0] = 2.43902
vals_druft := genvals(K, M)
I_C[0, 1]*(I_C[0, 0] + I_C[1, 0])/(I_C[0, 0]*I_C[1, 0]) = 4.87805
M = [1.23, 0, 0, 0; 0, 1.23, 0, 0; 0, 0, 1.23, 0; 0, 0, 0, 1.23]
makeNormVec(rawVec, matrM) :=
    k ← transpose(rawVec)*matrM*rawVec
    1/k*rawVec
makeEigVecs(mM, mK, vals) :=
    n ← rows(mM)
    MK ← mM^-1*mK
    return 1/mM if n == 1
    res[n - 1, n - 1] ← 0
    for k ∈ 0 .. n - 1
        rawVec ← eigenvec(MK, vals[k])
        vec ← makeNormVec(rawVec, mM)
        for i ∈ 0 .. n - 1
            res[i, k] ← res[i, k] + vec[i]
    res
prepareEVecs(mm) :=
    n ← cols(mm)
    res[n - 1] ← mm[:, n - 1]
    for i ∈ 0 .. n - 1
        res[i] ← mm[:, i]
    res
M^-1*K = [
    2.43902, -2.43902, 0, 0;
    -2.43902, 4.87805, -2.43902, 0;
    0, -2.43902, 4.87805, -2.43902;
    0, 0, -2.43902, 2.43902
]
makeResult(mIC) :=
    M ← _makeM(mIC)
    K ← _makeK(mIC)
    eig_vals ← _makeEigVals(M, K)
    eig_vecs ← makeEigVecs(M, K, eig_vals)
    1
    res[0] ← M
    res[1] ← K
    res[2] ← eig_vals
    res[3] ← prepareEVecs(eig_vecs)
    res
vI := I_C[:, 0]
vC := I_C[:, 1]
vI = [1.23; 1.23; 1.23; 1.23]
vC = [3; 3; 3; -1e307]
RR(kI, kC) := makeResult(makeDef_IC(n_disk, kI, kC))
sqrt(12/33) = 0.603023
j := 0 .. rows(RR(1, 1)[0])
_w2 :=
    c ← I_C[0, 1]
    I1 ← I_C[0, 0]
    I2 ← I_C[1, 0]
    sqrt(c*(I1 + I2)/(I1*I2))
_w2 = 2.20863
RR(1, 1)[2] = [0; 1.42875; 4.87805; 8.32735]
vectorize(sqrt(RR(1, 1)[2])) = [2.11489e-8i; 1.1953; 2.20863; 2.88571]
RR(1, 1)[3] = [
    [0.406504; 0.406504; 0.406504; 0.406504]; [-0.531123; -0.219998; 0.219998; 0.531123]; [-0.406504; 0.406504; 0.406504; -0.406504]; [0.219998; -0.531123; 0.531123; -0.219998]
]
genvals(K, M) = [8.32735; 4.87805; 0; 1.42875]
vV := RR(1, 1)[3]
vV[0] = [0.406504; 0.406504; 0.406504; 0.406504]
vV[1] = [-0.531123; -0.219998; 0.219998; 0.531123]
vV[2] = [-0.406504; 0.406504; 0.406504; -0.406504]
vLambda[j] := RR(1, 1)[2]
# [component: inputs RR(1, 1)[2]]
vV[3] = [0.219998; -0.531123; 0.531123; -0.219998]
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M = [1.23, 0, 0, 0; 0, 1.23, 0, 0; 0, 0, 1.23, 0; 0, 0, 0, 1.23]
rows(vV) = 4
n := 0 .. rows(vV) - 1
makeErrM(normVecs, MatrM) :=
    n ← rows(normVecs)
    r[n - 1, n - 1] ← 0
    for i ∈ 0 .. n - 1
        for j ∈ 0 .. n - 1
            e ← transpose(normVecs[i])*MatrM*normVecs[j]
            r[i, j] ← e
    r
makeErrM(vV, M) = [0.813008, 0, 0, 0; 0, 0.813008, 0, 0; 0, 0, 0.813008, 0; 0, 0, 0, 0.813008]
makeErrM(vV, K) = [0, 0, 0, 0; 0, 1.16158, 0, 0; 0, 0, 3.96589, 0; 0, 0, 0, 6.7702]
imax := 20
kI0 := 0.5
kIn := 1.5
i := 0 .. imax - 1
f :=
    jmax ← rows(RR(1, 1)[0])
    res[jmax - 1, imax - 1] ← 0
    for k ∈ 0 .. imax - 1
        kI ← kI0 + (kIn - kI0)/(imax - 1)*k
        vLambda ← RR(kI, 1)[2]
        res[:, k] ← vLambda
    res
# [component: inputs f]
f[:, 0] = [0; 1.83664; 5.96352; 9.27302]
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f = [
    0, 0, 0, 0, 0, 0, 0, 0, 0, 0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;
    1.83664, 1.78275, 1.7316, 1.68318, 1.63742, 1.59426, 1.55356, 1.51521, 1.47908, 1.44503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;
    5.96352, 5.79092, 5.63333, 5.49148, 5.36479, 5.25202, 5.15168, 5.06229, 4.98248, 4.91101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;
    9.27302, 9.03492, 8.85988, 8.72778, 8.62561, 8.54481, 8.47966, 8.42619, 8.38164, 8.34403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]
makeElem(Kloc, Mloc, l) :=
    v[3] ← l
    v[0] ← Kloc
    v[1] ← Mloc
    return v
tmp := makeDef_IC(2, 1, 1)
tmp = [1.23, 3; 1.23, -1e307]
_makeK(tmp) = [3, -3; -3, 3]
_makeM(tmp) = [1.23, 0; 0, 1.23]
vecKMlocal :=
    n ← 3
    v ← makeElem(_makeK(tmp), _makeM(tmp), 0.1)
    res[n - 1] ← v
    if n > 1
        for i ∈ 0 .. n - 2
            res[i] ← v
    res
vecKMlocal = [
    [[3, -3; -3, 3]; [1.23, 0; 0, 1.23]; 0; 0.1]; [[3, -3; -3, 3]; [1.23, 0; 0, 1.23]; 0; 0.1]; [[3, -3; -3, 3]; [1.23, 0; 0, 1.23]; 0; 0.1]
]
makeGlobMatr(localElems_KMl) :=
    s ← 0
    for i ∈ 0 .. rows(localElems_KMl) - 1
        s ← s + rows(localElems_KMl[i][0])
    size ← s - (rows(localElems_KMl) - 1)
    n ← size - 1
    K[n, n] ← 0
    M[n, n] ← 0
    size
makeGlobMatr(vecKMlocal) = 4
_makeK(mIC) :=
    n ← calcCount(mIC)[0]
    c1 ← mIC[0, 1]
    if n == 1
        return
            K[0, 0] ← c1
            K
    return makeKlocal(c1) if n == 2
    res[n - 1, n - 1] ← 0
    vc ← mIC[:, 1]
    sizeLocal ← 2
    for k ∈ 0 .. n - 2
        shift ← k
        for i ∈ 0 .. sizeLocal - 1
            for j ∈ 0 .. sizeLocal - 1
                is ← i + shift
                js ← j + shift
                res[is, js] ← res[is, js] + makeKlocal(vc[k])[i, j]
    res
M := [3.8*10^-6, 0, 0; 0, 2*3.8*10^-6, 0; 0, 0, 3.8*10^-6]
K := [161, -161, 0; -161, 322, -161; 0, -161, 161]
MK := M^-1*K
eigenvecs(MK) = [0.57735, -0.707107, 0.57735; 0.57735, 0, -0.57735; 0.57735, 0.707107, 0.57735]
vals := eigenvals(MK)
vals = [0; 42368421; 84736842]
vals^0.5 = [0; 6509.1; 9205.26]
M = [3.8e-6, 0, 0; 0, 7.6e-6, 0; 0, 0, 3.8e-6]
MK = [42368421, -42368421, 0; -21184211, 42368421, -21184211; 0, -42368421, 42368421]
eigenvecs([2, 1, 0; 1, 2, 1; 0, 1, 2]) = [0.5, -0.707107, 0.5; -0.707107, 0, 0.707107; 0.5, 0.707107, 0.5]
eigenvals([2, 1, 0; 1, 2, 1; 0, 1, 2]) = [0.585786; 2; 3.41421]
fA(d) := π*d^2/4
# Bending
fM_eb(ρ, d, l) :=
    A ← fA(d)
    m ← ρ*A*l/420
    M11 ← [156, 22*l, 0, 0; 22*l, 4*l*l, 0, 0; 0, 0, 156, -22*l; 0, 0, -22*l, 4*l*l]
    M12 ← [54, -13*l, 0, 0; 13*l, -3*l*l, 0, 0; 0, 0, 54, 13*l; 0, 0, -13*l, -3*l*l]
    M21 ← transpose(M12)
    M22 ← [156, -22*l, 0, 0; -22*l, 4*l*l, 0, 0; 0, 0, 156, 22*l; 0, 0, 22*l, 4*l*l]
    c1 ← stack(M11, M21)
    c2 ← stack(M12, M22)
    return augment(c1, c2)*m
fK_eb(ρ, d, E, l) :=
    I ← π*l*ρ*d^4/32
    m ← E*I/l^3
    K11 ← [12, 6*l, 0, 0; 6*l, 4*l*l, 0, 0; 0, 0, 12, -6*l; 0, 0, -6*l, 4*l*l]
    K12 ← [-12, 6*l, 0, 0; -6*l, 2*l*l, 0, 0; 0, 0, -12, -6*l; 0, 0, 6*l, 2*l*l]
    K21 ← transpose(K12)
    K22 ← [12, -6*l, 0, 0; -6*l, 4*l*l, 0, 0; 0, 0, 12, 6*l; 0, 0, 6*l, 4*l*l]
    c1 ← stack(K11, K21)
    c2 ← stack(K12, K22)
    return augment(c1, c2)*m
M_eb := fM_eb(7800, 0.01, 1)
K_eb := fK_eb(7800, 0.01, 2.1*10^11, 1)
vals := sort(eigenvals(M_eb^-1*K_eb))
M_eb = [
    0.227541, 0.0320891, 0, 0, 0.0787642, -0.0189618, 0, 0;
    0.0320891, 0.00583439, 0, 0, 0.0189618, -0.00437579, 0, 0;
    0, 0, 0.227541, -0.0320891, 0, 0, 0.0787642, 0.0189618;
    0, 0, -0.0320891, 0.00583439, 0, 0, -0.0189618, -0.00437579;
    0.0787642, 0.0189618, 0, 0, 0.227541, -0.0320891, 0, 0;
    -0.0189618, -0.00437579, 0, 0, -0.0320891, 0.00583439, 0, 0;
    0, 0, 0.0787642, -0.0189618, 0, 0, 0.227541, 0.0320891;
    0, 0, 0.0189618, -0.00437579, 0, 0, 0.0320891, 0.00583439
]
vals = [0; 0; 0; 0; 1.89e9; 1.89e9; 2.205e10; 2.205e10]
vals^0.5 = [0.00161945i; 0.00145924i; 0; 0.00117334; 43474.1; 43474.1; 148492; 148492]
K_eb = [
    19297233, 9648616, 0, 0, -19297233, 9648616, 0, 0;
    9648616, 6432411, 0, 0, -9648616, 3216205, 0, 0;
    0, 0, 19297233, -9648616, 0, 0, -19297233, -9648616;
    0, 0, -9648616, 6432411, 0, 0, 9648616, 3216205;
    -19297233, -9648616, 0, 0, 19297233, -9648616, 0, 0;
    9648616, 3216205, 0, 0, -9648616, 6432411, 0, 0;
    0, 0, -19297233, 9648616, 0, 0, 19297233, 9648616;
    0, 0, -9648616, 3216205, 0, 0, 9648616, 6432411
]
