# to generate raw Data | matrix function
ω_penalty := 1*10^-7
makeCol(d, cols) :=
    c ← cols - 1
    v[c] ← 0
    for i ∈ 0 .. c
        v[i] ← d
    v
dig2Col(d, M, col) :=
    r ← rows(M) - 1
    for i ∈ 0 .. r
        M[i, col] ← d
    M
dig2Matr(d, M) :=
    r ← rows(M) - 1
    c ← cols(M) - 1
    for i ∈ 0 .. r
        for j ∈ 0 .. c
            M[i, j] ← d
    M
genRawData(L_l, isFullLength, N, d, E, mu, ro) :=
    n ← N - 1
    M[n, 4] ← 0
    M[:, 0] ← makeCol(L_l/N, N) if isFullLength ≠ 0
    M[:, 0] ← makeCol(L_l, N) otherwise
    M[:, 1] ← makeCol(d, N)
    M[:, 2] ← makeCol(E, N)
    M[:, 3] ← makeCol(mu, N)
    M[:, 4] ← makeCol(ro, N)
    M
genRawData(1, 666, 3, 0.1, 2.1*10^11, 0.3, 7800) = [
    0.333333, 0.1, 210000000000, 0.3, 7800;
    0.333333, 0.1, 210000000000, 0.3, 7800;
    0.333333, 0.1, 210000000000, 0.3, 7800
]
genRawData(1, 0, 3, 0.01, 2.1*10^11, 0.3, 7800) = [
    1, 0.01, 210000000000, 0.3, 7800;
    1, 0.01, 210000000000, 0.3, 7800;
    1, 0.01, 210000000000, 0.3, 7800
]
mkKloc(aG, aI, al) := aG*aI/al*[1, -1; -1, 1]
multOuter(avi, aM, avj) := transpose(avi)*aM*avj
mkMloc(aro, aI, al) := aro*aI*al/6*[2, 1; 1, 2]
getDiag(aM) :=
    r ← rows(aM) - 1
    v[r] ← 0
    for i ∈ 0 .. r
        v[i] ← aM[i, i]
    v
getOutDiag(aM) :=
    r ← rows(aM) - 1
    v[r] ← 0
    for i ∈ 0 .. r
        for j ∈ 0 .. r
            v[i + j*r] ← aM[i, j]
    v
fG(aE, amu) := aE/(2*(1 + amu))
calcSizeGlobMatr(n) :=
    return 2 if n == 1
    return n + 1
fI(ad) := π*(ad/2)^4/2
makeKM0(RawData) :=
    r ← rows(RawData)
    n ← calcSizeGlobMatr(r)
    K[n - 1, n - 1] ← 0
    M ← K
    sizeLoc ← 2
    for k ∈ 0 .. r - 1
        vl ← RawData[k, 0]
        vd ← RawData[k, 1]
        vE ← RawData[k, 2]
        vmu ← RawData[k, 3]
        vro ← RawData[k, 4]
        vI ← fI(vd)
        Kloc ← mkKloc(fG(vE, vmu), vI, vl)
        Mloc ← mkMloc(vro, vI, vl)
        p ← sizeLoc*k/2
        for i ∈ 0 .. sizeLoc - 1
            for j ∈ (0 .. sizeLoc - 1)
                K[i + p, j + p] ← K[i + p, j + p] + Kloc[i, j]
                M[i + p, j + p] ← M[i + p, j + p] + Mloc[i, j]
    v[0] ← K
    v[1] ← M
    v
getMaxInOutDiag(aM) :=
    diag ← getDiag(aM)
    outDiag ← getOutDiag(aM)
    v[1] ← max(|outDiag|)
    v[0] ← min(|diag|)
    v
getErrNormilize(aΦ, aM) :=
    n ← rows(aM)
    vM[n - 1, n - 1] ← 0
    for i ∈ 0 .. n - 1
        for j ∈ 0 .. n - 1
            e ← multOuter(aΦ[:, i], aM, aΦ[:, j])
            vM[i, j] ← |e|
    vM
Nfem := 3
RD := genRawData(1, 666, Nfem, 0.01, 2.1*10^11, 0.28, 7800)
_makeEigVals(aKM) :=
    valsDraft ← genvals(aKM[0], aKM[1])
    c ← rows(valsDraft) - 1
    v[c] ← 0
    for i ∈ 0 .. c
        v[i] ← 0 if valsDraft[i] < ω_penalty
        v[i] ← valsDraft[i] otherwise
    return sort(v)  # ω_penalty
testKM := makeKM0(RD)
testKM[0] = [
    241.602, -241.602, 0, 0;
    -241.602, 483.204, -241.602, 0;
    0, -241.602, 483.204, -241.602;
    0, 0, -241.602, 241.602
]
testKM[1] = [
    8.50848e-7, 4.25424e-7, 0, 0;
    4.25424e-7, 1.7017e-6, 4.25424e-7, 0;
    0, 4.25424e-7, 1.7017e-6, 4.25424e-7;
    0, 0, 4.25424e-7, 8.50848e-7
]
makeNormVec(rawVec, matrM) :=
    k ← multOuter(rawVec, matrM, rawVec)
    1/k^0.5*rawVec
makeEigVecs(aKM, vals) :=
    n ← rows(aKM[0])
    vM ← aKM[1]
    MK ← vM^-1*aKM[0]
    return 1/vM if n == 1
    res[n - 1, n - 1] ← 0
    for k ∈ 0 .. n - 1
        rawVec ← eigenvec(MK, vals[k])
        vec ← makeNormVec(rawVec, vM)
        res[:, k] ← vec
    res
_makeEigVals(testKM) = [0; 113581731; 567908654; 1.13582e9]
sqrt(_makeEigVals(testKM)) = [0; 10657.5; 23830.8; 33701.9]
testΦ := makeEigVecs(testKM, _makeEigVals(testKM))
ti := 0 .. rows(testΦ) - 1
testΦ = [
    -361.371, 559.833, 722.741, 625.912;
    -361.371, 279.916, -361.371, -625.912;
    -361.371, -279.916, -361.371, 625.912;
    -361.371, -559.833, 722.741, -625.912
]
calcEigenProblemMK(aKM) :=
    v[0] ← _makeEigVals(aKM)
    v[1] ← makeEigVecs(aKM, v[0])
    v
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# make the matrises
makeKlocal(c) := [c, -c; -c, c]
calcErrEigenProblem(a_eigData, aKM) :=
    n ← rows(aKM[0])
    rM ← getErrNormilize(a_eigData[1], aKM[1])
    rM2 ← rM - identity(n)
    1
    rK ← getErrNormilize(a_eigData[1], aKM[0])
    mLambda ← diag(a_eigData[0])
    rK2 ← rK - mLambda
    v[0] ← getMaxInOutDiag(rK2)
    v[1] ← getMaxInOutDiag(rM2)
    v
tstErrEig := calcErrEigenProblem(calcEigenProblemMK(testKM), testKM)
tstErrEig[1] = [5.08768e-16; 5.87639e-16]
tstErrEig[0] = [1.49012e-8; 1.25338e-7]
# Cantilevered Beams
RD = [
    0.333333, 0.01, 210000000000, 0.28, 7800;
    0.333333, 0.01, 210000000000, 0.28, 7800;
    0.333333, 0.01, 210000000000, 0.28, 7800
]
clRD :=
    r ← RD
    r
solverStatic(aKM, aP) :=
    r ← lsolve(aKM[0], aP)
    1
    r
multCanti := 10^6
cantileverKM := makeKM0(clRD)
testSolverStatic(aKM, indexC, valueP, indexP, multC) :=
    K ← aKM[0]
    n ← rows(K) - 1
    i ← indexC
    K[i, i] ← K[i, i]*multC
    vP[n] ← 0
    vP[indexP] ← valueP
    twist ← lsolve(K, vP)
    twist
tstTwist2 := testSolverStatic(cantileverKM, 0, 1, rows(cantileverKM[0]) - 1, multCanti)
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fA(d) := π*d^2/4
# Bending
fM_eb(ρ, d, l) :=
    A ← fA(d)
    m ← ρ*A*l/420
    M11 ← [156, 22*l, 0, 0; 22*l, 4*l*l, 0, 0; 0, 0, 156, -22*l; 0, 0, -22*l, 4*l*l]
    M12 ← [54, -13*l, 0, 0; 13*l, -3*l*l, 0, 0; 0, 0, 54, 13*l; 0, 0, -13*l, -3*l*l]
    M21 ← transpose(M12)
    M22 ← [156, -22*l, 0, 0; -22*l, 4*l*l, 0, 0; 0, 0, 156, 22*l; 0, 0, 22*l, 4*l*l]
    c1 ← stack(M11, M21)
    c2 ← stack(M12, M22)
    return augment(c1, c2)*m
fK_eb(ρ, d, E, l) :=
    I ← π*l*ρ*d^4/32
    m ← E*I/l^3
    K11 ← [12, 6*l, 0, 0; 6*l, 4*l*l, 0, 0; 0, 0, 12, -6*l; 0, 0, -6*l, 4*l*l]
    K12 ← [-12, 6*l, 0, 0; -6*l, 2*l*l, 0, 0; 0, 0, -12, -6*l; 0, 0, 6*l, 2*l*l]
    K21 ← transpose(K12)
    K22 ← [12, -6*l, 0, 0; -6*l, 4*l*l, 0, 0; 0, 0, 12, 6*l; 0, 0, 6*l, 4*l*l]
    c1 ← stack(K11, K21)
    c2 ← stack(K12, K22)
    return augment(c1, c2)*m
M_eb := fM_eb(7800, 0.01, 1)
K_eb := fK_eb(7800, 0.01, 2.1*10^11, 1)
vals := sort(eigenvals(M_eb^-1*K_eb))
vals = [0; 0; 0; 0; 1.89e9; 1.89e9; 2.205e10; 2.205e10]
vals^0.5 = [0.00161945i; 0.00145924i; 0; 0.00117334; 43474.1; 43474.1; 148492; 148492]
